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/batch
! ANSYS input file written by Workbench version 2023 R1
! File used for geometry attach: C:\Users\simon\Desktop\Test Ansys - Copia\test_files\dp0\Geom-7\DM\Geom-7.agdb
/title,test--Modal (E5)
/COM,/COM,     LSDYNA, 2023.1
/COM,/COM,     ANSYSMotion, 2023.1
/com,--- Data in consistent MKS units. See Solving Units in the help system for more information.
/units,MKS
/prep7
! Turn off shape checking because checks already performed inside WB mesher.
! See help system for more information.
SHPP,OFF,,NOWARN
etcon,set             ! allow ANSYS to choose best KEYOP's for 180x elements, resets any applicable keyopt to MAPDL defaults
/com,*********** Nodes for the whole assembly ***********
nblock,3,,1485
(1i9,3e20.9e3)
        1     0.000000000E+00     1.150000000E-02     0.000000000E+00
        2     4.000000000E-03     1.150000000E-02     0.000000000E+00
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-1
/com,*********** Elements for Body 1 "Surface Body" ***********
et,1,183
keyo,1,3,1
eblock,19,solid,,54
(19i9)
        1        1        1        1        0        0        0        0        8        0      109      429      407      408      462      503      502      504      544
        1        1        1        1        0        0        0        0        8        0      110      462      461      430      429      591      546      543      544
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-1
/com,*********** Elements for Body 2 "Surface Body" ***********
et,2,183
keyo,2,3,1
eblock,19,solid,,108
(19i9)
        2        2        2        2        0        0        0        0        8        0      271     1035     1104     1105     1026     1234     1350     1206     1203
        2        2        2        2        0        0        0        0        8        0      272     1026     1046     1044     1035     1205     1259     1233     1203
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-1
/com,*********** Elements for Body 3 "Surface Body" ***********
et,3,183
keyo,3,3,1
eblock,19,solid,,96
(19i9)
        3        3        3        3        0        0        0        0        8        0      163      637      706      710      636      801      923      798      795
        3        3        3        3        0        0        0        0        8        0      164      636      655      654      637      797      847      800      795
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-1
/com,*********** Elements for Body 4 "Surface Body" ***********
et,4,183
keyo,4,3,1
eblock,19,solid,,12
(19i9)
        4        4        4        4        0        0        0        0        8        0      259      945      931      930      941      958      956      957      975
        4        4        4        4        0        0        0        0        8        0      260      941      938      939      945      971      970      972      975
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-1
/com,*********** Elements for Body 5 "Surface Body" ***********
et,5,183
keyo,5,3,1
eblock,19,solid,,12
(19i9)
        5        5        5        5        0        0        0        0        8        0        1       21        7        6       17       34       32       33       51
        5        5        5        5        0        0        0        0        8        0        2       17       14       15       21       47       46       48       51
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-1
/com,*********** Elements for Body 6 "Surface Body" ***********
et,6,183
keyo,6,3,1
eblock,19,solid,,96
(19i9)
        6        6        6        6        0        0        0        0        8        0       13       99      168      172       98      263      385      260      257
        6        6        6        6        0        0        0        0        8        0       14       98      117      116       99      259      309      262      257
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-1
/com,*********** Send User Defined Coordinate System(s) ***********
csys,0
toffst,273.15,  ! Temperature offset from absolute zero
/com,*********** Set Reference Temperature ***********
tref,22.
/com,*********** Send Materials ***********
MP,DENS,1,4507,	! kg m^-3
MP,EX,1,168000000000,	! Pa
MP,NUXY,1,0.32,

MP,DENS,2,4507,	! kg m^-3
MP,EX,2,168000000000,	! Pa
MP,NUXY,2,0.32,

MP,DENS,3,4507,	! kg m^-3
MP,EX,3,168000000000,	! Pa
MP,NUXY,3,0.32,

MP,DENS,4,7780,	! kg m^-3

TB,ELASTIC,4,,,AELS

TBDATA,1,114000000000,75700000000,72400000000,0,0,0
TBDATA,7,114000000000,72400000000,0,0,0,111000000000
TBDATA,13,0,0,0,26300000000,0,0
TBDATA,19,26300000000,0,19200000000

TB,DPER,4,,,0

TBDATA,1,2120,2120,1980,0,0,0

MP,DENS,5,7780,	! kg m^-3

TB,ELASTIC,5,,,AELS

TBDATA,1,114000000000,75700000000,72400000000,0,0,0
TBDATA,7,114000000000,72400000000,0,0,0,111000000000
TBDATA,13,0,0,0,26300000000,0,0
TBDATA,19,26300000000,0,19200000000

TB,DPER,5,,,0

TBDATA,1,2120,2120,1980,0,0,0

MP,DENS,6,4507,	! kg m^-3
MP,EX,6,168000000000,	! Pa
MP,NUXY,6,0.32,

/com,*********** Send Sheet Properties ***********
!************************* Model Summary ********************
!Surface Body,	Titanio,	matid,	1
!Surface Body,	Titanio,	matid,	2
!Surface Body,	Titanio,	matid,	3
!Surface Body,	PZ 21,	matid,	4
!Surface Body,	PZ 21,	matid,	5
!Surface Body,	Titanio,	matid,	6
!************************* End Model Summary ********************
/com,*********** Create Contact "Contact Region 3" ***********
*set,tid,8
*set,cid,7
r,tid
r,cid
et,tid,169
et,cid,172
eblock,10,,,3
(15i9)
      379        8        8        8        0      428      388      466
      380        8        8        8        0      427      428      540
      381        8        8        8        0      409      427      506
-1
eblock,10,,,3
(15i9)
      382        7        7        7        0      428      388      466
      383        7        7        7        0      427      428      540
      384        7        7        7        0      409      427      506
-1
eblock,10,,,3
(15i9)
      385        7        8        7        0      980      978     1111
      386        7        8        7        0      981      980     1116
      387        7        8        7        0      979      981     1113
-1
eblock,10,,,3
(15i9)
      388        8        7        8        0      980      978     1111
      389        8        7        8        0      981      980     1116
      390        8        7        8        0      979      981     1113
-1
keyo,cid,8,2               ! auto create asymmetric contact (from Program Controlled setting)
keyo,cid,10,0              ! adjust contact stiffness each NR iteration (from Program Controlled setting)
keyo,cid,12,5              ! bonded always
keyo,cid,18,1              ! small sliding turned on by application
keyo,cid,2,0               ! augmented Lagrange (from Program Controlled setting)
keyo,cid,4,0               ! on Gauss point (from Program Controlled setting)
keyo,cid,9,1               ! ignore initial gaps/penetration
keyo,cid,7,0               ! No Prediction
rmod,tid,3,10.      ! FKN
rmod,tid,5,0.       ! ICONT
rmod,tid,6,-1.16430235193654e-004       ! PINB
rmod,tid,10,0.      ! CNOF
rmod,tid,12,0.      ! FKT
rmod,tid,36,229     ! WB DSID
rmod,cid,3,10.      ! FKN
rmod,cid,5,0.       ! ICONT
rmod,cid,6,-1.16430235193654e-004       ! PINB
rmod,cid,10,0.      ! CNOF
rmod,cid,12,0.      ! FKT
rmod,cid,36,229     ! WB DSID
/com,*********** Create Contact "Contact Region 4" ***********
*set,tid,10
*set,cid,9
r,tid
r,cid
et,tid,169
et,cid,172
eblock,10,,,6
(15i9)
      391       10       10       10        0     1005     1000     1154
      392       10       10       10        0     1004     1005     1162
      393       10       10       10        0     1003     1004     1160
      394       10       10       10        0     1002     1003     1158
      395       10       10       10        0     1001     1002     1156
      396       10       10       10        0      982     1001     1120
-1
eblock,10,,,6
(15i9)
      397        9        9        9        0     1005     1000     1154
      398        9        9        9        0     1004     1005     1162
      399        9        9        9        0     1003     1004     1160
      400        9        9        9        0     1002     1003     1158
      401        9        9        9        0     1001     1002     1156
      402        9        9        9        0      982     1001     1120
-1
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eblock,10,,,6
(15i9)
      409       10        9       10        0      594      592      711
      410       10        9       10        0      595      594      715
      411       10        9       10        0      596      595      717
      412       10        9       10        0      597      596      719
      413       10        9       10        0      598      597      721
      414       10        9       10        0      593      598      713
-1
keyo,cid,8,2               ! auto create asymmetric contact (from Program Controlled setting)
keyo,cid,10,0              ! adjust contact stiffness each NR iteration (from Program Controlled setting)
keyo,cid,12,5              ! bonded always
keyo,cid,18,1              ! small sliding turned on by application
keyo,cid,2,0               ! augmented Lagrange (from Program Controlled setting)
keyo,cid,4,0               ! on Gauss point (from Program Controlled setting)
keyo,cid,9,1               ! ignore initial gaps/penetration
keyo,cid,7,0               ! No Prediction
rmod,tid,3,10.      ! FKN
rmod,tid,5,0.       ! ICONT
rmod,tid,6,-1.16430235193654e-004       ! PINB
rmod,tid,10,0.      ! CNOF
rmod,tid,12,0.      ! FKT
rmod,tid,36,232     ! WB DSID
rmod,cid,3,10.      ! FKN
rmod,cid,5,0.       ! ICONT
rmod,cid,6,-1.16430235193654e-004       ! PINB
rmod,cid,10,0.      ! CNOF
rmod,cid,12,0.      ! FKT
rmod,cid,36,232     ! WB DSID
/com,*********** Create Contact "Contact Region 5" ***********
*set,tid,12
*set,cid,11
r,tid
r,cid
et,tid,169
et,cid,172
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eblock,10,,,6
(15i9)
      433       12       11       12        0      931      930      956
      434       12       11       12        0      930      929      954
      435       12       11       12        0      929      928      952
      436       12       11       12        0      928      927      950
      437       12       11       12        0      927      925      946
      438       12       11       12        0      926      931      948
-1
keyo,cid,8,2               ! auto create asymmetric contact (from Program Controlled setting)
keyo,cid,10,0              ! adjust contact stiffness each NR iteration (from Program Controlled setting)
keyo,cid,12,5              ! bonded always
keyo,cid,18,1              ! small sliding turned on by application
keyo,cid,2,0               ! augmented Lagrange (from Program Controlled setting)
keyo,cid,4,0               ! on Gauss point (from Program Controlled setting)
keyo,cid,9,1               ! ignore initial gaps/penetration
keyo,cid,7,0               ! No Prediction
rmod,tid,3,10.      ! FKN
rmod,tid,5,0.       ! ICONT
rmod,tid,6,-1.16430235193654e-004       ! PINB
rmod,tid,10,0.      ! CNOF
rmod,tid,12,0.      ! FKT
rmod,tid,36,235     ! WB DSID
rmod,cid,3,10.      ! FKN
rmod,cid,5,0.       ! ICONT
rmod,cid,6,-1.16430235193654e-004       ! PINB
rmod,cid,10,0.      ! CNOF
rmod,cid,12,0.      ! FKT
rmod,cid,36,235     ! WB DSID
/com,*********** Create Contact "Contact Region 6" ***********
*set,tid,14
*set,cid,13
r,tid
r,cid
et,tid,169
et,cid,172
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eblock,10,,,6
(15i9)
      457       14       13       14        0        7        6       32
      458       14       13       14        0        6        5       30
      459       14       13       14        0        5        4       28
      460       14       13       14        0        4        3       26
      461       14       13       14        0        3        1       22
      462       14       13       14        0        2        7       24
-1
keyo,cid,8,2               ! auto create asymmetric contact (from Program Controlled setting)
keyo,cid,10,0              ! adjust contact stiffness each NR iteration (from Program Controlled setting)
keyo,cid,12,5              ! bonded always
keyo,cid,18,1              ! small sliding turned on by application
keyo,cid,2,0               ! augmented Lagrange (from Program Controlled setting)
keyo,cid,4,0               ! on Gauss point (from Program Controlled setting)
keyo,cid,9,1               ! ignore initial gaps/penetration
keyo,cid,7,0               ! No Prediction
rmod,tid,3,10.      ! FKN
rmod,tid,5,0.       ! ICONT
rmod,tid,6,-1.16430235193654e-004       ! PINB
rmod,tid,10,0.      ! CNOF
rmod,tid,12,0.      ! FKT
rmod,tid,36,238     ! WB DSID
rmod,cid,3,10.      ! FKN
rmod,cid,5,0.       ! ICONT
rmod,cid,6,-1.16430235193654e-004       ! PINB
rmod,cid,10,0.      ! CNOF
rmod,cid,12,0.      ! FKT
rmod,cid,36,238     ! WB DSID
/com,*********** Create Contact "Contact Region 7" ***********
*set,tid,16
*set,cid,15
r,tid
r,cid
et,tid,169
et,cid,172
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eblock,10,,,6
(15i9)
      481       16       15       16        0       56       54      173
      482       16       15       16        0       57       56      177
      483       16       15       16        0       58       57      179
      484       16       15       16        0       59       58      181
      485       16       15       16        0       60       59      183
      486       16       15       16        0       55       60      175
-1
keyo,cid,8,2               ! auto create asymmetric contact (from Program Controlled setting)
keyo,cid,10,0              ! adjust contact stiffness each NR iteration (from Program Controlled setting)
keyo,cid,12,5              ! bonded always
keyo,cid,18,1              ! small sliding turned on by application
keyo,cid,2,0               ! augmented Lagrange (from Program Controlled setting)
keyo,cid,4,0               ! on Gauss point (from Program Controlled setting)
keyo,cid,9,1               ! ignore initial gaps/penetration
keyo,cid,7,0               ! No Prediction
rmod,tid,3,10.      ! FKN
rmod,tid,5,0.       ! ICONT
rmod,tid,6,-1.16430235193654e-004       ! PINB
rmod,tid,10,0.      ! CNOF
rmod,tid,12,0.      ! FKT
rmod,tid,36,241     ! WB DSID
rmod,cid,3,10.      ! FKN
rmod,cid,5,0.       ! ICONT
rmod,cid,6,-1.16430235193654e-004       ! PINB
rmod,cid,10,0.      ! CNOF
rmod,cid,12,0.      ! FKT
rmod,cid,36,241     ! WB DSID
nsel,all
esel,all
/com,*********** Send Named Selection as Node Component ***********
CMBLOCK,ESTREMO_TOP,NODE,        1
(8i10)
       406
fini
/solu
antype,2                   ! modal analysis
_thickRatio=  0     ! Ratio of thick parts in the model
modopt,lanb,6,1.,100000000.
outres,erase
outres,all,none
outres,nsol,all
mxpand                    ! default expand in case of complex solution
dmpopt,esav,no
dmpopt,emat,no
dmpopt,full,no
/com,***********  Piezoelectric Body1 ***********
CMBLOCK,Piezoelectric Body1,NODE,      53
(8i10)
       925       926       927       928       929       930       931       932
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
/PREP7
CMSEL,S,Piezoelectric Body1
ESLN,S,1
ESEL,R,ENAME,,185
*GET,iNum185,ELEM,0, COUNT
*IF, iNum185,GT,0,THEN
_icurrentElem = 0
*DO,ar30,1,iNum185,1
    _icurrentElem = ELNEXT(_icurrentElem)
    EMODIF,_icurrentElem,ESYS,0
	*GET, _icurrentETyp, ELEM, _icurrentElem, ATTR, TYPE
    ET,_icurrentETyp,226,1001
	*GET, _icurrentMat, ELEM, _icurrentElem, ATTR, MAT
	MPDELE,RSVX, _icurrentMat
	MPDELE,RSVY, _icurrentMat
	MPDELE,RSVZ, _icurrentMat
	TB,PIEZ,_icurrentMat,,,0
	TBDATA,  2, -2.92
	TBDATA,  5, 23.4
	TBDATA,  8, -2.92
	TBDATA, 10, 16.19
	TBDATA, 15, 16.19

	TB,DPER,_icurrentMat,,,0
	TBDATA, 1, 2120, 1980, 2120

*ENDDO
*ENDIF

CMSEL,S,Piezoelectric Body1
ESLN,S,1
ESEL,R,ENAME,,186
*GET,iNum186,ELEM,0, COUNT
*IF, iNum186,GT,0,THEN
_icurrentElem = 0
*DO,ar30,1,iNum186,1
    _icurrentElem = ELNEXT(_icurrentElem)
    EMODIF,_icurrentElem,ESYS,0
	*GET, _icurrentETyp, ELEM, _icurrentElem, ATTR, TYPE
    ET,_icurrentETyp,226,1001
	*GET, _icurrentMat, ELEM, _icurrentElem, ATTR, MAT
	MPDELE,RSVX, _icurrentMat
	MPDELE,RSVY, _icurrentMat
	MPDELE,RSVZ, _icurrentMat
	TB,PIEZ,_icurrentMat,,,0
	TBDATA,  2, -2.92
	TBDATA,  5, 23.4
	TBDATA,  8, -2.92
	TBDATA, 10, 16.19
	TBDATA, 15, 16.19

	TB,DPER,_icurrentMat,,,0
	TBDATA, 1, 2120, 1980, 2120

*ENDDO
*ENDIF

CMSEL,S,Piezoelectric Body1
ESLN,S,1
ESEL,R,ENAME,,187
*GET,iNum187,ELEM,0, COUNT
*IF, iNum187,GT,0,THEN
_icurrentElem = 0
*DO,ar30,1,iNum187,1
    _icurrentElem = ELNEXT(_icurrentElem)
    EMODIF,_icurrentElem,ESYS,0
	*GET, _icurrentETyp, ELEM, _icurrentElem, ATTR, TYPE
    ET,_icurrentETyp,227,1001
	*GET, _icurrentMat, ELEM, _icurrentElem, ATTR, MAT
	MPDELE,RSVX, _icurrentMat
	MPDELE,RSVY, _icurrentMat
	MPDELE,RSVZ, _icurrentMat
	TB,PIEZ,_icurrentMat,,,0
	TBDATA,  2, -2.92
	TBDATA,  5, 23.4
	TBDATA,  8, -2.92
	TBDATA, 10, 16.19
	TBDATA, 15, 16.19

	TB,DPER,_icurrentMat,,,0
	TBDATA, 1, 2120, 1980, 2120

*ENDDO
*ENDIF

CMSEL,S,Piezoelectric Body1
ESLN,S,1
ESEL,R,ENAME,,182
*GET,iNum182,ELEM,0, COUNT
*IF, iNum182,GT,0,THEN
_icurrentElem = 0
*DO,ar30,1,iNum182,1
    _icurrentElem = ELNEXT(_icurrentElem)
    EMODIF,_icurrentElem,ESYS,0
	*GET, _icurrentETyp, ELEM, _icurrentElem, ATTR, TYPE
	*GET, _planebehavior, ETYP, _icurrentETyp, ATTR, KOP3
	*IF, _planebehavior, EQ, 3, THEN
	    _planebehavior = 0
	*ENDIF
    ET,_icurrentETyp,223,1001,,_planebehavior
	*GET, _icurrentMat, ELEM, _icurrentElem, ATTR, MAT
	MPDELE,RSVX, _icurrentMat
	MPDELE,RSVY, _icurrentMat
	MPDELE,RSVZ, _icurrentMat
	TB,PIEZ,_icurrentMat,,,0
	TBDATA,  2, -2.92
	TBDATA,  5, 23.4
	TBDATA,  8, -2.92
	TBDATA, 10, 16.19

	TB,DPER,_icurrentMat,,,0
	TBDATA, 1, 2120, 1980, 2120

*ENDDO
*ENDIF

CMSEL,S,Piezoelectric Body1
ESLN,S,1
ESEL,R,ENAME,,183
*GET,iNum183,ELEM,0, COUNT
*IF, iNum183,GT,0,THEN
_icurrentElem = 0
*DO,ar30,1,iNum183,1
    _icurrentElem = ELNEXT(_icurrentElem)
    EMODIF,_icurrentElem,ESYS,0
	*GET, _icurrentETyp, ELEM, _icurrentElem, ATTR, TYPE
	*GET, _planebehavior, ETYP, _icurrentETyp, ATTR, KOP3
	*IF, _planebehavior, EQ, 3, THEN
	    _planebehavior = 0
	*ENDIF
    ET,_icurrentETyp,223,1001,,_planebehavior
	*GET, _icurrentMat, ELEM, _icurrentElem, ATTR, MAT
	MPDELE,RSVX, _icurrentMat
	MPDELE,RSVY, _icurrentMat
	MPDELE,RSVZ, _icurrentMat
	TB,PIEZ,_icurrentMat,,,0
	TBDATA,  2, -2.92
	TBDATA,  5, 23.4
	TBDATA,  8, -2.92
	TBDATA, 10, 16.19

	TB,DPER,_icurrentMat,,,0
	TBDATA, 1, 2120, 1980, 2120

*ENDDO
*ENDIF

EMUNIT, EPZRO, 8.854E-12

/SOLU
ALLSEL,ALL
OUTRES,FGRAD,ALL

/com,***********  Piezoelectric Body 234 ***********
CMBLOCK,Piezoelectric Body34,NODE,      53
(8i10)
         1         2         3         4         5         6         7         8
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
/PREP7
CMSEL,S,Piezoelectric Body34
ESLN,S,1
ESEL,R,ENAME,,185
*GET,iNum185,ELEM,0, COUNT
*IF, iNum185,GT,0,THEN
_icurrentElem = 0
*DO,ar30,1,iNum185,1
    _icurrentElem = ELNEXT(_icurrentElem)
    EMODIF,_icurrentElem,ESYS,0
	*GET, _icurrentETyp, ELEM, _icurrentElem, ATTR, TYPE
    ET,_icurrentETyp,226,1001
	*GET, _icurrentMat, ELEM, _icurrentElem, ATTR, MAT
	MPDELE,RSVX, _icurrentMat
	MPDELE,RSVY, _icurrentMat
	MPDELE,RSVZ, _icurrentMat
	TB,PIEZ,_icurrentMat,,,0
	TBDATA,  2, -2.92
	TBDATA,  5, 23.4
	TBDATA,  8, -2.92
	TBDATA, 10, 16.19
	TBDATA, 15, 16.19

	TB,DPER,_icurrentMat,,,0
	TBDATA, 1, 2120, 1980, 2120

*ENDDO
*ENDIF

CMSEL,S,Piezoelectric Body34
ESLN,S,1
ESEL,R,ENAME,,186
*GET,iNum186,ELEM,0, COUNT
*IF, iNum186,GT,0,THEN
_icurrentElem = 0
*DO,ar30,1,iNum186,1
    _icurrentElem = ELNEXT(_icurrentElem)
    EMODIF,_icurrentElem,ESYS,0
	*GET, _icurrentETyp, ELEM, _icurrentElem, ATTR, TYPE
    ET,_icurrentETyp,226,1001
	*GET, _icurrentMat, ELEM, _icurrentElem, ATTR, MAT
	MPDELE,RSVX, _icurrentMat
	MPDELE,RSVY, _icurrentMat
	MPDELE,RSVZ, _icurrentMat
	TB,PIEZ,_icurrentMat,,,0
	TBDATA,  2, -2.92
	TBDATA,  5, 23.4
	TBDATA,  8, -2.92
	TBDATA, 10, 16.19
	TBDATA, 15, 16.19

	TB,DPER,_icurrentMat,,,0
	TBDATA, 1, 2120, 1980, 2120

*ENDDO
*ENDIF

CMSEL,S,Piezoelectric Body34
ESLN,S,1
ESEL,R,ENAME,,187
*GET,iNum187,ELEM,0, COUNT
*IF, iNum187,GT,0,THEN
_icurrentElem = 0
*DO,ar30,1,iNum187,1
    _icurrentElem = ELNEXT(_icurrentElem)
    EMODIF,_icurrentElem,ESYS,0
	*GET, _icurrentETyp, ELEM, _icurrentElem, ATTR, TYPE
    ET,_icurrentETyp,227,1001
	*GET, _icurrentMat, ELEM, _icurrentElem, ATTR, MAT
	MPDELE,RSVX, _icurrentMat
	MPDELE,RSVY, _icurrentMat
	MPDELE,RSVZ, _icurrentMat
	TB,PIEZ,_icurrentMat,,,0
	TBDATA,  2, -2.92
	TBDATA,  5, 23.4
	TBDATA,  8, -2.92
	TBDATA, 10, 16.19
	TBDATA, 15, 16.19

	TB,DPER,_icurrentMat,,,0
	TBDATA, 1, 2120, 1980, 2120

*ENDDO
*ENDIF

CMSEL,S,Piezoelectric Body34
ESLN,S,1
ESEL,R,ENAME,,182
*GET,iNum182,ELEM,0, COUNT
*IF, iNum182,GT,0,THEN
_icurrentElem = 0
*DO,ar30,1,iNum182,1
    _icurrentElem = ELNEXT(_icurrentElem)
    EMODIF,_icurrentElem,ESYS,0
	*GET, _icurrentETyp, ELEM, _icurrentElem, ATTR, TYPE
	*GET, _planebehavior, ETYP, _icurrentETyp, ATTR, KOP3
	*IF, _planebehavior, EQ, 3, THEN
	    _planebehavior = 0
	*ENDIF
    ET,_icurrentETyp,223,1001,,_planebehavior
	*GET, _icurrentMat, ELEM, _icurrentElem, ATTR, MAT
	MPDELE,RSVX, _icurrentMat
	MPDELE,RSVY, _icurrentMat
	MPDELE,RSVZ, _icurrentMat
	TB,PIEZ,_icurrentMat,,,0
	TBDATA,  2, -2.92
	TBDATA,  5, 23.4
	TBDATA,  8, -2.92
	TBDATA, 10, 16.19

	TB,DPER,_icurrentMat,,,0
	TBDATA, 1, 2120, 1980, 2120

*ENDDO
*ENDIF

CMSEL,S,Piezoelectric Body34
ESLN,S,1
ESEL,R,ENAME,,183
*GET,iNum183,ELEM,0, COUNT
*IF, iNum183,GT,0,THEN
_icurrentElem = 0
*DO,ar30,1,iNum183,1
    _icurrentElem = ELNEXT(_icurrentElem)
    EMODIF,_icurrentElem,ESYS,0
	*GET, _icurrentETyp, ELEM, _icurrentElem, ATTR, TYPE
	*GET, _planebehavior, ETYP, _icurrentETyp, ATTR, KOP3
	*IF, _planebehavior, EQ, 3, THEN
	    _planebehavior = 0
	*ENDIF
    ET,_icurrentETyp,223,1001,,_planebehavior
	*GET, _icurrentMat, ELEM, _icurrentElem, ATTR, MAT
	MPDELE,RSVX, _icurrentMat
	MPDELE,RSVY, _icurrentMat
	MPDELE,RSVZ, _icurrentMat
	TB,PIEZ,_icurrentMat,,,0
	TBDATA,  2, -2.92
	TBDATA,  5, 23.4
	TBDATA,  8, -2.92
	TBDATA, 10, 16.19

	TB,DPER,_icurrentMat,,,0
	TBDATA, 1, 2120, 1980, 2120

*ENDDO
*ENDIF

EMUNIT, EPZRO, 8.854E-12

/SOLU
ALLSEL,ALL
OUTRES,FGRAD,ALL

! *********** WB SOLVE COMMAND ***********
! check interactive state
*get,ANSINTER_,active,,int
*if,ANSINTER_,ne,0,then
/eof
*endif
solve
/com *************** Write FE CONNECTORS *********
CEWRITE,file,ce,,INTE
*get,_nmodalsolproc,active,0,numcpu
fini
*get,_NSOLTHREADS,active,0,ntfs
*get,_NSOLPROCESSES,active,0,npfs
/post1
*dim,_direction,CHAR,6,1
_direction(1) = 'X'
_direction(2) = 'Y'
_direction(3) = 'Z'
_direction(4) = 'ROTX'
_direction(5) = 'ROTY'
_direction(6) = 'ROTZ'
*get,_lastLS,active,0,set,LSTP
*get,_beginset,active,0,set,nset,first,_lastLS
*get,_endset,active,0,set,nset,last,_lastLS
_nummodes = 0
*if,_endset,gt,0,then
_nummodes = _endset - _beginset + 1
*endif
*do,i_mode,1,_nummodes
   *do,j_component,1,6
			*get,PFACT_%i_mode%_%j_component%,MODE,%i_mode%,PFACT,,DIREC,_direction(%j_component%)
   *enddo
*enddo
*dim,_tmdirection,CHAR,6,1
_tmdirection(1) = 'X'
_tmdirection(2) = 'Y'
_tmdirection(3) = 'Z'
_tmdirection(4) = 'X'
_tmdirection(5) = 'Y'
_tmdirection(6) = 'Z'
*do,j_component,1,6
    *if,j_component,gt,3,then
        *get,TOTALMASS_%j_component%,ELEM,0,IOR,_tmdirection(%j_component%)
    *else
        *get,TOTALMASS_%j_component%,ELEM,0,MTOT,_tmdirection(%j_component%)
    *endif
*enddo
fini
